#!/usr/bin/python3
import Sofa

required_plugins = [
    'SofaBaseMechanics', 'SofaBoundaryCondition', 'SofaEngine', 'SofaImplicitOdeSolver',
    'SofaLoader', 'SofaOpenglVisual', 'SofaSparseSolver', 'SofaSimpleFem', 'OffscreenCamera'
]


def createScene(root):
    for p in required_plugins:
        root.addObject('RequiredPlugin', name=p)

    root.dt = 1
    root.addObject('VisualStyle', displayFlags='showBehavior showVisual')
    root.addChild('beam')

    # Camera
    root.beam.addObject('OffscreenCamera',
                        name='camera_beam_and_circle',
                        filepath='/home/jnbrunet/sources/offscreen/%s_%i.png',
                        save_frame_before_first_step=True,
                        save_frame_after_each_n_steps=5,
                        position=[0, 0, 20], lookAt=[0, 0, 0], zNear=0.01, zFar=100, projectionType=1, printLog=True)

    # Solver
    root.beam.addObject('StaticSolver', newton_iterations=10)
    root.beam.addObject('SparseLDLSolver')

    # Topology
    root.beam.addObject('RegularGridTopology', name='grid', n=[5, 5, 21], min=[-2, -2, -10], max=[2, 2, 10])
    root.beam.addObject('HexahedronSetTopologyContainer', name='container', src='@grid')

    # Mechanical
    root.beam.addObject('MechanicalObject', name='mo', src='@grid')
    root.beam.addObject('HexahedronFEMForceField', poissonRatio=0.45, youngModulus=5000)

    # Fixed boundary
    root.beam.addObject('BoxROI', box=[-2, -2, -10.1, 2, 2, -9.9], drawBoxes=True, name='fixed_face')
    root.beam.addObject('FixedConstraint', indices='@fixed_face.indices')

    # Traction boundary
    root.beam.addObject('BoxROI', box=[-2, -2, 9.9, 2, 2, 10.1], name='traction_face')
    root.beam.addObject('LinearForceField', points='@traction_face.indices', times=[0, 4], forces=[0, -1, 0, 0, -10, 0])

    # Immersed ball
    root.beam.addChild('ball')
    root.beam.ball.addObject('MeshObjLoader', name='loader', filename='mesh/ball.obj', translation=[0, 0, 9])
    root.beam.ball.addObject('OglModel', src='@loader', color='red')
    root.beam.ball.addObject('BarycentricMapping')


if __name__ == "__main__":
    import SofaRuntime

    root = Sofa.Core.Node()
    createScene(root)
    Sofa.Simulation.init(root)
    # Sofa.SofaGL.glewInit()
    Sofa.Simulation.initVisual(root)
    Sofa.Simulation.initTextures(root)
    for _ in range(5):
        Sofa.Simulation.animate(root, 1)
        Sofa.Simulation.updateVisual(root)

    # import Sofa.Gui
    # Sofa.Gui.GUIManager.Init("myscene", "qglviewer")
    # Sofa.Gui.GUIManager.createGUI(root, __file__)
    # Sofa.Gui.GUIManager.SetDimension(1080, 1080)
    # # Initialization of the scene will be done here
    # Sofa.Gui.GUIManager.MainLoop(root)
    # Sofa.Gui.GUIManager.closeGUI()
